*HEADING
cubit(eneous-waveguide-solver/microstrip_mesh_test_20220706.inp): 07/06/2022: 16
version: 2021.11
**
********************************** P A R T S **********************************
*PART, NAME=Part-Default
**
********************************** N O D E S **********************************
*NODE, NSET=ALLNODES
       1,   -1.270000e-03,    2.387600e-03,    0.000000e+00
       2,   -1.270000e-03,    5.969000e-04,    0.000000e+00
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**
********************************** E L E M E N T S ****************************
*ELEMENT, TYPE=STRI3, ELSET=Vacuum
       1,      27,      87,      26
       2,      11,      88,      10
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*ELEMENT, TYPE=STRI3, ELSET=Substrate
     727,      56,     433,      55
     728,     416,     434,     415
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*ELEMENT, TYPE=B21, ELSET=PEC
    1016,     408,     410
    1017,     410,     411
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**
********************************** P R O P E R T I E S ************************
*SHELL SECTION, ELSET=Vacuum, SECTION INTEGRATION=SIMPSON, MATERIAL=Default-Steel
1.000000e+00
*SHELL SECTION, ELSET=Substrate, SECTION INTEGRATION=SIMPSON, MATERIAL=Default-Steel
1.000000e+00
**
*END PART
**
**
**
********************************** E N D   P A R T S **********************************
**
**
********************************** A S S E M B L Y ************************************
**
*ASSEMBLY, NAME=ASSEMBLY1
**
*INSTANCE, NAME=Part-Default_1, PART=Part-Default
*END INSTANCE
**
*END ASSEMBLY
**
**
**
*MATERIAL, NAME = Default-Steel
*ELASTIC, TYPE=ISOTROPIC
2.068000e+05, 2.900000e-01
*DENSITY
7.000000e-06
*CONDUCTIVITY,TYPE=ISO
4.500000e-02
*SPECIFIC HEAT
5.000000e+02
**
**
************************************** H I S T O R Y *************************************
**
*PREPRINT
**
**************************************** S T E P 1 ***************************************
*STEP,INC=100,NAME=Default Set
**
*STATIC
1, 1, 1e-05, 1
**
**
**
**
*END STEP
